<?xml version="1.0"?>

<Node 	name="Root" gravity="0 0 0" time="0" animate="0"  dt="0.5" showAxis="true">

<RequiredPlugin name="Sofa.Component.SolidMechanics.FEM.Elastic"/>
<RequiredPlugin name="Sofa.Component.StateContainer"/>
<RequiredPlugin name="Sofa.Component.Topology.Container.Constant"/>
<DefaultAnimationLoop/>

<!--Mechanical Object-->
<MechanicalObject name="DOFs" showObject="1"  showObjectScale="5"  showIndices="1"  showIndicesScale="0.0003" position="0 0 0 1 0 0 0.5 0.86602540378443864676 0 0.5 0.288675134594812882254 1" />

<!--Topology Tetrahedra-->
<MeshTopology name="tetra"  tetrahedra="0 1 2 3"  drawTetrahedra="1" position="@DOFs.position"/>

</Node>
