<?xml version="1.0"?>

<!-- A pendulum made of a string of particles connected by distance constraints -->
<!-- Inspired by the CompliantPendulum.scn from the Compliant plugin -->
<Node name="Root" gravity="0 -10 0" time="0" animate="0"  dt="0.01">
    <RequiredPlugin name="Sofa.Component.AnimationLoop"/> <!-- Needed to use components [FreeMotionAnimationLoop] -->
    <RequiredPlugin name="Sofa.Component.Constraint.Lagrangian.Correction"/> <!-- Needed to use components [GenericConstraintCorrection] -->
    <RequiredPlugin name="Sofa.Component.Constraint.Lagrangian.Model"/> <!-- Needed to use components [UniformConstraint] -->
    <RequiredPlugin name="Sofa.Component.Constraint.Lagrangian.Solver"/> <!-- Needed to use components [GenericConstraintSolver] -->
    <RequiredPlugin name="Sofa.Component.Constraint.Projective"/> <!-- Needed to use components [FixedConstraint] -->
    <RequiredPlugin name="Sofa.Component.Engine.Transform"/> <!-- Needed to use components [TransformEngine] -->
    <RequiredPlugin name="Sofa.Component.IO.Mesh"/> <!-- Needed to use components [StringMeshCreator] -->
    <RequiredPlugin name="Sofa.Component.LinearSolver.Direct"/> <!-- Needed to use components [SparseCholeskySolver] -->
    <RequiredPlugin name="Sofa.Component.Mapping.MappedMatrix"/> <!-- Needed to use components [MappingGeometricStiffnessForceField] -->
    <RequiredPlugin name="Sofa.Component.Mapping.NonLinear"/> <!-- Needed to use components [DistanceMapping] -->
    <RequiredPlugin name="Sofa.Component.Mass"/> <!-- Needed to use components [DiagonalMass] -->
    <RequiredPlugin name="Sofa.Component.ODESolver.Backward"/> <!-- Needed to use components [EulerImplicitSolver] -->
    <RequiredPlugin name="Sofa.Component.StateContainer"/> <!-- Needed to use components [MechanicalObject] -->
    <RequiredPlugin name="Sofa.Component.Topology.Container.Dynamic"/> <!-- Needed to use components [EdgeSetGeometryAlgorithms EdgeSetTopologyContainer] -->
    <RequiredPlugin name="Sofa.Component.Visual"/> <!-- Needed to use components [VisualStyle] -->
    <RequiredPlugin name="Sofa.Component.Engine.Select"/> <!-- Needed to use components [PointsFromIndices] -->

    <DefaultVisualManagerLoop/>
    <VisualStyle displayFlags="showVisualModels showBehaviorModels showMappings showForceFields" />

    <FreeMotionAnimationLoop solveVelocityConstraintFirst="true" computeBoundingBox="false"/>
    <GenericConstraintSolver tolerance="1e-9" maxIterations="1000"/>
    <!-- resolution = number of particles (including the fixed one) -->
    <!-- scale = total length of the pendulum -->
    <!-- 1m long wire -->
    <!--
    if the wire is not too much descritized (resolution around 10 or below ) then it remains stable with or
    without the implicit formulation of the constraint force
    -->
    <StringMeshCreator name="loader" resolution="20" scale3d="1 1 1" />

    <Node  name="withImplicitConstraintForce" >
        <TransformEngine name="translate" input_position="@../loader.position" translation="0 0 0" />
        <EulerImplicitSolver />
        <SparseCholeskySolver />
        <GenericConstraintCorrection />

        <EdgeSetTopologyContainer name="topology" position="@translate.output_position" edges="@../loader.edges" />
        <MechanicalObject name="defoDOF" template="Vec3d" />
        <EdgeSetGeometryAlgorithms drawEdges="true" />
        <FixedConstraint indices="0" />
        <!-- 1 g for the total mass of the wire -->
        <DiagonalMass  name="mass" totalMass="1e-3"/>
        <MappingGeometricStiffnessForceField mapping="@./extensionsNode/distanceMapping" />
        <Node name="extensionsNode" >
            <MechanicalObject template="Vec1d"  name="extensionsDOF" />
            <DistanceMapping  name="distanceMapping" topology="@../topology"/>
            <UniformConstraint template="Vec1d" iterative="false" />
        </Node>

        <Node name="visual">
            <PointsFromIndices name="points" position="@../defoDOF.position" indices="19"/>
            <TrailRenderer template="Vec3d" position="@points.indices_position" nbSteps="50"/>
        </Node>
    </Node>

    <Node  name="withoutImplicitConstraintForce" >
        <TransformEngine name="translate" input_position="@../loader.position" translation="0 0 -2" />
        <EulerImplicitSolver />
        <SparseCholeskySolver />
        <GenericConstraintCorrection />
        <!-- resolution = number of particles (including the fixed one) -->
        <!-- scale = total length of the pendulum -->
        <EdgeSetTopologyContainer name="topology" position="@translate.output_position" edges="@../loader.edges" />
        <MechanicalObject name="defoDOF" template="Vec3d"  />
        <EdgeSetGeometryAlgorithms drawEdges="true" />
        <FixedConstraint indices="0" />
        <!-- 1 g for the total mass of the wire -->
        <DiagonalMass  name="mass" totalMass="1e-3"/>
        <Node name="extensionsNode" >
            <MechanicalObject template="Vec1d"  name="extensionsDOF" />
            <DistanceMapping  name="distanceMapping" topology="@../topology"/>
            <UniformConstraint template="Vec1d" iterative="false" />
        </Node>

        <Node name="visual">
            <PointsFromIndices name="points" position="@../defoDOF.position" indices="19"/>
            <TrailRenderer template="Vec3d" position="@points.indices_position" nbSteps="50"/>
        </Node>
    </Node>

</Node>
