<Node name="root" dt="0.02" gravity="0 -10 0">

    <Node name="plugins">
        <RequiredPlugin name="Sofa.Component.Constraint.Projective"/> <!-- Needed to use components [FixedProjectiveConstraint] -->
        <RequiredPlugin name="Sofa.Component.Engine.Select"/> <!-- Needed to use components [BoxROI] -->
        <RequiredPlugin name="Sofa.Component.LinearSolver.Direct"/> <!-- Needed to use components [EigenSimplicialLDLT] -->
        <RequiredPlugin name="Sofa.Component.LinearSystem"/> <!-- Needed to use components [CompositeLinearSystem MatrixLinearSystem MatrixProjectionMethod] -->
        <RequiredPlugin name="Sofa.Component.Mapping.Linear"/> <!-- Needed to use components [BarycentricMapping IdentityMapping SubsetMapping] -->
        <RequiredPlugin name="Sofa.Component.Mapping.NonLinear"/> <!-- Needed to use components [RigidMapping] -->
        <RequiredPlugin name="Sofa.Component.Mass"/> <!-- Needed to use components [MeshMatrixMass] -->
        <RequiredPlugin name="Sofa.Component.MechanicalLoad"/> <!-- Needed to use components [ConstantForceField] -->
        <RequiredPlugin name="Sofa.Component.ODESolver.Backward"/> <!-- Needed to use components [EulerImplicitSolver] -->
        <RequiredPlugin name="Sofa.Component.SolidMechanics.FEM.Elastic"/> <!-- Needed to use components [HexahedronFEMForceField] -->
        <RequiredPlugin name="Sofa.Component.SolidMechanics.Spring"/> <!-- Needed to use components [SpringForceField] -->
        <RequiredPlugin name="Sofa.Component.StateContainer"/> <!-- Needed to use components [MechanicalObject] -->
        <RequiredPlugin name="Sofa.Component.Topology.Container.Dynamic"/> <!-- Needed to use components [HexahedronSetGeometryAlgorithms] -->
        <RequiredPlugin name="Sofa.Component.Topology.Container.Grid"/> <!-- Needed to use components [RegularGridTopology] -->
        <RequiredPlugin name="Sofa.Component.Visual"/> <!-- Needed to use components [VisualStyle] -->
        <RequiredPlugin name="Sofa.GL.Component.Rendering3D"/> <!-- Needed to use components [OglModel] -->
        <RequiredPlugin name="SofaMatrix.Qt"/> <!-- Needed to use components [GlobalSystemMatrixImage] -->

    </Node>

    <VisualStyle displayFlags="showBehaviorModels showWireframe" />

    <DefaultAnimationLoop/>
    <DefaultVisualManagerLoop/>

    <Node name="rigidSections" printLog="true">
        <EulerImplicitSolver name="odesolver" rayleighStiffness="0.1" rayleighMass="0.1" />

        <Node name="matrices">
            <MatrixLinearSystem template="CompressedRowSparseMatrixd" name="system" checkIndices="true" printLog="true"/>
            <MatrixLinearSystem template="CompressedRowSparseMatrixd" name="GS" assembleStiffness="false" assembleMass="false" assembleDamping="false" assembleGeometricStiffness="true" applyProjectiveConstraints="false"/>
            <GlobalSystemMatrixImage name="imageA" linearSystem="@system"/>
            <GlobalSystemMatrixImage name="imageGS" linearSystem="@GS"/>
        </Node>

        <CompositeLinearSystem template="CompressedRowSparseMatrixd" name="solverSystem" linearSystems="@matrices/system @matrices/GS" solverLinearSystem="@matrices/system"/>
        <EigenSimplicialLDLT template="CompressedRowSparseMatrixd" linearSystem="@solverSystem"/>

        <Node name="red">

            <RegularGridTopology name="grid" nx="1" ny="1" nz="20" xmin="0" xmax="0" ymin="-1.5" ymax="1.5" zmin="0" zmax="19" />
            <MechanicalObject template="Rigid3d" name="DOFs" showObject="true" showObjectScale="1" position="@grid.position"/>
            <FixedProjectiveConstraint name="fixConstraint" indices="0" />
            <Node name="FEM">
                <RegularGridTopology name="FEM_grid" nx="4" ny="4" nz="20" xmin="-1.5" xmax="1.5" ymin="-1.5" ymax="1.5" zmin="0" zmax="19" />
                <MechanicalObject template="Vec3d" name="DOFs" position="@FEM_grid.position" printLog="false"/>
                <HexahedronSetGeometryAlgorithms/>
                <MeshMatrixMass name="mass" totalMass="320"/>
                <HexahedronFEMForceField name="FEM" youngModulus="10000" poissonRatio="0.45" method="large" printLog="false"/>

                <RigidMapping name="rigidMapping" geometricStiffness="2" globalToLocalCoords="true"
                              rigidIndexPerPoint="0 0 0 0 0 0 0 0 0 0 0 0 0 0 0 0 1 1 1 1 1 1 1 1 1 1 1 1 1 1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"/>

                <Node name="Visual">
                    <RegularGridTopology name="grid" nx="2" ny="2" nz="20" xmin="-1.5" xmax="1.5" ymin="-1.5" ymax="1.5" zmin="0" zmax="19" computeTriangleList="false" />
                    <OglModel name="visu" lineWidth="5" material="Default Diffuse 0 1 1 1 1 Ambient 1 1 0 0 1 Specular 0 1 0 0 1 Emissive 0 1 0 0 1 Shininess 0 45"/>
                    <BarycentricMapping name="barycentricMapping" input="@../DOFs" output="@visu"/>
                </Node>
            </Node>
        </Node>

        <Node name="green">
            <VisualStyle displayFlags="showInteractionForceFields" />
            <MechanicalObject template="Vec3d" name="DOFs" printLog="false"/>
            <RegularGridTopology name="grid" nx="4" ny="4" nz="20" xmin="-1.5" xmax="1.5" ymin="-9" ymax="-6" zmin="0" zmax="19" />
            <HexahedronSetGeometryAlgorithms/>
            <MeshMatrixMass name="mass" totalMass="320"/>
            <BoxROI template="Vec3d" name="box" box="-1.6 -9.1 -0.1 1.6 -5.1 0.0001"/>
            <FixedProjectiveConstraint name="fixConstraint" indices="@box.indices" />
            <HexahedronFEMForceField name="FEM" youngModulus="10000" poissonRatio="0.45" method="large" printLog="false"/>

            <Node name="a">
                <BoxROI name="box" position="@../DOFs.position" box="1.4 -6.1 18.9 1.6 -5.9 19.1" drawBoxes="true" doUpdate="false"/>
                <MechanicalObject template="Vec3d" name="DOFs"/>
                <SubsetMapping name="subsetMapping_a" input="@../DOFs" output="@DOFs" indices="@box.indices"/>
            </Node>
            <Node name="b">
                <BoxROI name="box" position="@../DOFs.position" box="1.4 -6.1 1.9 1.6 -5.9 2.1" drawBoxes="true" doUpdate="false"/>
                <MechanicalObject template="Vec3d" name="DOFs"/>
                <SubsetMapping name="subsetMapping_b" input="@../DOFs" output="@DOFs" indices="@box.indices"/>
            </Node>
            <MatrixProjectionMethod areJacobiansConstant="true" mechanicalStates="@/rigidSections/green/a/DOFs @/rigidSections/green/a/DOFs"/>
            <MatrixProjectionMethod areJacobiansConstant="true" mechanicalStates="@/rigidSections/green/a/DOFs @/rigidSections/green/b/DOFs"/>
            <MatrixProjectionMethod areJacobiansConstant="true" mechanicalStates="@/rigidSections/green/b/DOFs @/rigidSections/green/a/DOFs"/>
            <MatrixProjectionMethod areJacobiansConstant="true" mechanicalStates="@/rigidSections/green/b/DOFs @/rigidSections/green/b/DOFs"/>
            <SpringForceField name="spring_a-b" object1="@a/DOFs" object2="@b/DOFs" spring="0 0 100 1 1" showArrowSize="0.05" drawMode="2"/>

            <Node name="Visual">
                <RegularGridTopology name="grid" n="@../grid.n" xmin="-1.5" xmax="1.5" ymin="-9" ymax="-6" zmin="0" zmax="19" computeTriangleList="false" />
                <OglModel name="visu" lineWidth="2" material="Default Diffuse 0 1 1 1 1 Ambient 1 0 1 0 1 Specular 0 1 0 0 1 Emissive 0 1 0 0 1 Shininess 0 45"/>
                <BarycentricMapping name="barycentricMapping" input="@../DOFs" output="@visu"/>
            </Node>
        </Node>

        <Node name="blue">

            <RegularGridTopology name="grid" nx="1" ny="1" nz="20" xmin="5" xmax="5" ymin="-1.5" ymax="1.5" zmin="0" zmax="19" />
            <MechanicalObject template="Rigid3d" name="DOFs" showObject="true" showObjectScale="1" position="@grid.position"/>
            <FixedProjectiveConstraint name="fixConstraint" indices="0" />

            <Node name="intermediateMapping"> <!-- this mapping is introduced just to verify that geometric stiffness is well projected -->

                <MechanicalObject template="Rigid3d" name="DOFs" showObject="false"/>
                <ConstantForceField forces="0 0 0.0005 0 0 0"/>
                <IdentityMapping name="id" input="@../DOFs" output="@DOFs"/>

                <Node name="FEM">
                    <RegularGridTopology name="FEM_grid" nx="4" ny="4" nz="20" xmin="3.5" xmax="6.5" ymin="-1.5" ymax="1.5" zmin="0" zmax="19" />
                    <MechanicalObject template="Vec3d" name="DOFs" position="@FEM_grid.position" printLog="false"/>
                    <HexahedronSetGeometryAlgorithms/>
                    <MeshMatrixMass name="mass" totalMass="320"/>
                    <HexahedronFEMForceField name="FEM_c" youngModulus="10000" poissonRatio="0.45" method="large" printLog="false"/>

                    <RigidMapping geometricStiffness="2" globalToLocalCoords="true" rigidIndexPerPoint="0 0 0 0 0 0 0 0 0 0 0 0 0 0 0 0 1 1 1 1 1 1 1 1 1 1 1 1 1 1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"/>

                    <Node name="Visual">
                        <RegularGridTopology name="grid" nx="2" ny="2" nz="20" xmin="3.5" xmax="6.5" ymin="-1.5" ymax="1.5" zmin="0" zmax="19" computeTriangleList="false" />
                        <OglModel name="visu" lineWidth="5" material="Default Diffuse 0 1 1 1 1 Ambient 1 0 0 1 1 Specular 0 1 0 0 1 Emissive 0 1 0 0 1 Shininess 0 45"/>
                        <BarycentricMapping name="barycentricMapping" input="@../DOFs" output="@visu"/>
                    </Node>
                </Node>
            </Node>
        </Node>

        <Node name="spring">
            <VisualStyle displayFlags="showInteractionForceFields" />

            <Node name="nonMappedDOFsSpring">
                <SpringForceField name="spring_red-blue" object1="@red/DOFs" object2="@blue/DOFs" spring="19 19 50 1 1" showArrowSize="0.05" drawMode="2"/>
            </Node>

            <Node name="springBetweenMappedAndNonMapped">
                <BoxROI position="@red/FEM/DOFs.position" box="-1.6 -1.6 18.9 -1.4 -1.4 19.1" drawBoxes="true"/>
                <BoxROI position="@green/DOFs.position" box="-1.6 -6.1 18.9 -1.4 -5.9 19.1" drawBoxes="true"/>
                <SpringForceField name="spring_red-green" object1="@red/FEM/DOFs" object2="@green/DOFs" spring="304 316 100 1 1" showArrowSize="0.05" drawMode="2"/>
            </Node>
        </Node>
    </Node>

</Node>
