<Node name="root" dt="0.01">
    <RequiredPlugin pluginName="SofaOpenglVisual"/>
    <RequiredPlugin pluginName='SofaBoundaryCondition'/>
    <RequiredPlugin pluginName='SofaDeformable'/>
    <RequiredPlugin pluginName='SofaEngine'/>
    <RequiredPlugin pluginName='SofaImplicitOdeSolver'/>
    <RequiredPlugin pluginName='SofaLoader'/>
    <RequiredPlugin pluginName='SofaMeshCollision'/>
    <RequiredPlugin pluginName='SofaMiscCollision'/>

    <DefaultPipeline depth="6" verbose="0" draw="0" />
    <BruteForceBroadPhase/>
    <BVHNarrowPhase/>
    <MinProximityIntersection name="Proximity" usePointPoint="1" alarmDistance="3.5" contactDistance="1.5" />
    <DefaultContactManager name="Response" response="default" />
    <DefaultCollisionGroupManager name="Group" />
    <Node name="Frog">
        <EulerImplicitSolver  rayleighStiffness="0.1" rayleighMass="0.1" />
        <CGLinearSolver iterations="30" tolerance="1e-5" threshold="1e-5"/>
        <SparseGridTopology n="10 5 10" fileTopology="mesh/frog.obj" />
        <MechanicalObject dx="-10.0" name="dofs"/>
        <UniformMass vertexMass="1.0" />
        <BoxConstraint box="-18.0 2.0 -5.0 -2.0 3.0 5.0" />
        <MeshSpringForceField name="Springs" stiffness="50000" damping="4" />
        <Node name="Visu">
            <MeshObjLoader name="meshLoader_0" filename="mesh/frog.obj" />
            <OglModel name="Visual" src="@meshLoader_0" color="0.5 1.0 0.5 1.0" />
            <BarycentricMapping input="@../dofs" output="@Visual" />
        </Node>
        <Node name="TriangleSurf">
            <MeshObjLoader name="loader" filename="mesh/frog.obj" />
            <MeshTopology src="@loader" />
            <MechanicalObject src="@loader" />
            <TriangleCollisionModel group="1" />
            <LineCollisionModel group="1" />
            <PointCollisionModel group="1" />
            <SurfacePressureForceField pressure="50000.0" pulseMode="true" pressureSpeed="20000.0" />
            <BarycentricMapping input="@.." output="@." />
        </Node>
    </Node>
    <Node name="Frog2">
        <EulerImplicitSolver />
        <CGLinearSolver iterations="30" tolerance="1e-5" threshold="1e-5"/>
        <SparseGridTopology n="10 5 10" fileTopology="mesh/frog_quads.obj" />
        <MechanicalObject dx="10.0" />
        <UniformMass vertexMass="1.0" />
        <BoxConstraint box="2.0 2.0 -5.0 18.0 3.0 5.0" />
        <MeshSpringForceField name="Springs" stiffness="50000" damping="4" />
        <Node name="Visu">
            <MeshObjLoader name="meshLoader_1" filename="mesh/frog_quads.obj" handleSeams="1" />
            <OglModel name="Visual" src="@meshLoader_1" color="1.0 0.5 0.5 1.0" />
            <BarycentricMapping input="@.." output="@Visual" />
        </Node>
        <Node name="QuadSurf">
            <MeshObjLoader name="loader" filename="mesh/frog_quads.obj" />
            <MeshTopology src="@loader" />
            <MechanicalObject src="@loader" />
            <TriangleCollisionModel group="1" />
            <LineCollisionModel group="1" />
            <PointCollisionModel group="1" />
            <SurfacePressureForceField pressure="50000.0" pulseMode="true" pressureSpeed="20000.0" />
            <BarycentricMapping input="@.." output="@." />
        </Node>
    </Node>
</Node>
