<Node name="root" dt="0.02" gravity="0 -10 0">
    <VisualStyle displayFlags="showBehaviorModels showWireframe" />

    <RequiredPlugin name="SofaConstraint"/>
    <RequiredPlugin name="sofa.component.linearsolver.direct"/>
    <RequiredPlugin name="sofa.component.odesolver.backward"/>
    <RequiredPlugin name="SofaMiscForceField"/>
    <RequiredPlugin name="SofaSimpleFem"/>
    <RequiredPlugin name="SofaOpenglVisual"/>
    <RequiredPlugin name="SofaMatrix"/>

    <DefaultAnimationLoop/>
    <DefaultVisualManagerLoop/>

    <Node name="rigidSections">
        <EulerImplicitSolver name="odesolver" rayleighStiffness="0.1" rayleighMass="0.1" />
        <SparseLDLSolver template="CompressedRowSparseMatrixd" linearSystem="@A"/>
        <ConstantSparsityPatternSystem name="A"/>
        <GlobalSystemMatrixImage name="imageA" linearSystem="@A"/>

        <Node name="object_a">

            <RegularGridTopology name="grid" nx="1" ny="1" nz="20" xmin="0" xmax="0" ymin="-1.5" ymax="1.5" zmin="0" zmax="19" />
            <MechanicalObject template="Rigid3d" name="DOFs" showObject="true" showObjectScale="1" position="@grid.position"/>
            <FixedConstraint indices="0" />
            <Node name="FEM">
                <RegularGridTopology name="FEM_grid" nx="4" ny="4" nz="20" xmin="-1.5" xmax="1.5" ymin="-1.5" ymax="1.5" zmin="0" zmax="19" />
                <MechanicalObject template="Vec3d" name="FEM_DOFs_a" position="@FEM_grid.position" printLog="false"/>
                <HexahedronSetGeometryAlgorithms/>
                <UniformMass vertexMass="1"/>
                <HexahedronFEMForceField name="FEM_a" youngModulus="10000" poissonRatio="0.45" method="large" printLog="false"/>

                <RigidMapping globalToLocalCoords="true" rigidIndexPerPoint="0 0 0 0 0 0 0 0 0 0 0 0 0 0 0 0 1 1 1 1 1 1 1 1 1 1 1 1 1 1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"/>

                <Node name="Visual">
                    <RegularGridTopology name="grid" nx="2" ny="2" nz="20" xmin="-1.5" xmax="1.5" ymin="-1.5" ymax="1.5" zmin="0" zmax="19" computeTriangleList="false" />
                    <OglModel name="visu" lineWidth="5" material="Default Diffuse 0 1 1 1 1 Ambient 1 1 0 0 1 Specular 0 1 0 0 1 Emissive 0 1 0 0 1 Shininess 0 45"/>
                    <BarycentricMapping input="@../FEM_DOFs_a" output="@visu"/>
                </Node>
            </Node>
        </Node>

        <Node name="object_b">
            <MechanicalObject template="Vec3d" name="FEM_DOFs_b" printLog="false"/>
            <RegularGridTopology name="grid" nx="4" ny="4" nz="20" xmin="-1.5" xmax="1.5" ymin="-9" ymax="-6" zmin="0" zmax="19" />
            <HexahedronSetGeometryAlgorithms/>
            <UniformMass totalMass="320"/>
            <BoxROI template="Vec3d" name="box" box="-1.6 -9.1 -0.1 1.6 -5.1 0.0001"/>
            <FixedConstraint indices="@box.indices" />
            <HexahedronFEMForceField name="FEM_b" youngModulus="10000" poissonRatio="0.45" method="large" printLog="false"/>

            <Node name="Visual">
                <RegularGridTopology name="grid" n="@../grid.n" xmin="-1.5" xmax="1.5" ymin="-9" ymax="-6" zmin="0" zmax="19" computeTriangleList="false" />
                <OglModel name="visu" lineWidth="2" material="Default Diffuse 0 1 1 1 1 Ambient 1 0 1 0 1 Specular 0 1 0 0 1 Emissive 0 1 0 0 1 Shininess 0 45"/>
                <BarycentricMapping input="@../FEM_DOFs_b" output="@visu"/>
            </Node>
        </Node>

        <Node name="object_c">

            <RegularGridTopology name="grid" nx="1" ny="1" nz="20" xmin="5" xmax="5" ymin="-1.5" ymax="1.5" zmin="0" zmax="19" />
            <MechanicalObject template="Rigid3d" name="DOFs" showObject="true" showObjectScale="1" position="@grid.position"/>
            <FixedConstraint indices="0" />
            <Node name="FEM">
                <RegularGridTopology name="FEM_grid" nx="4" ny="4" nz="20" xmin="3.5" xmax="6.5" ymin="-1.5" ymax="1.5" zmin="0" zmax="19" />
                <MechanicalObject template="Vec3d" name="FEM_DOFs_c" position="@FEM_grid.position" printLog="false"/>
                <HexahedronSetGeometryAlgorithms/>
                <UniformMass vertexMass="1"/>
                <HexahedronFEMForceField name="FEM_c" youngModulus="10000" poissonRatio="0.45" method="large" printLog="false"/>

                <RigidMapping globalToLocalCoords="true" rigidIndexPerPoint="0 0 0 0 0 0 0 0 0 0 0 0 0 0 0 0 1 1 1 1 1 1 1 1 1 1 1 1 1 1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"/>

                <Node name="Visual">
                    <RegularGridTopology name="grid" nx="2" ny="2" nz="20" xmin="3.5" xmax="6.5" ymin="-1.5" ymax="1.5" zmin="0" zmax="19" computeTriangleList="false" />
                    <OglModel name="visu" lineWidth="5" material="Default Diffuse 0 1 1 1 1 Ambient 1 0 0 1 1 Specular 0 1 0 0 1 Emissive 0 1 0 0 1 Shininess 0 45"/>
                    <BarycentricMapping input="@../FEM_DOFs_c" output="@visu"/>
                </Node>
            </Node>
        </Node>
    </Node>

</Node>
