<Node name="root" dt="0.02" gravity="0 -10 0">
    <VisualStyle displayFlags="showBehaviorModels showWireframe" />

    <RequiredPlugin name="Sofa.Component.AnimationLoop"/> <!-- Needed to use components [FreeMotionAnimationLoop] -->
    <RequiredPlugin name="Sofa.Component.Constraint.Lagrangian.Correction"/> <!-- Needed to use components [GenericConstraintCorrection] -->
    <RequiredPlugin name="Sofa.Component.Constraint.Lagrangian.Solver"/> <!-- Needed to use components [GenericConstraintSolver] -->
    <RequiredPlugin name="Sofa.Component.Constraint.Projective"/> <!-- Needed to use components [FixedConstraint] -->
    <RequiredPlugin name="Sofa.Component.LinearSolver.Direct"/> <!-- Needed to use components [SparseLDLSolver] -->
    <RequiredPlugin name="Sofa.Component.LinearSystem"/> <!-- Needed to use components [IndirectAssemblingMatrixSystem] -->
    <RequiredPlugin name="Sofa.Component.Mapping.Linear"/> <!-- Needed to use components [BarycentricMapping] -->
    <RequiredPlugin name="Sofa.Component.Mapping.NonLinear"/> <!-- Needed to use components [RigidMapping] -->
    <RequiredPlugin name="Sofa.Component.Mass"/> <!-- Needed to use components [MeshMatrixMass] -->
    <RequiredPlugin name="Sofa.Component.ODESolver.Backward"/> <!-- Needed to use components [EulerImplicitSolver] -->
    <RequiredPlugin name="Sofa.Component.SolidMechanics.FEM.Elastic"/> <!-- Needed to use components [HexahedronFEMForceField] -->
    <RequiredPlugin name="Sofa.Component.StateContainer"/> <!-- Needed to use components [MechanicalObject] -->
    <RequiredPlugin name="Sofa.Component.Topology.Container.Dynamic"/> <!-- Needed to use components [HexahedronSetGeometryAlgorithms] -->
    <RequiredPlugin name="Sofa.Component.Topology.Container.Grid"/> <!-- Needed to use components [RegularGridTopology] -->
    <RequiredPlugin name="Sofa.Component.Visual"/> <!-- Needed to use components [VisualStyle] -->
    <RequiredPlugin name="Sofa.GL.Component.Rendering3D"/> <!-- Needed to use components [OglModel] -->

    <FreeMotionAnimationLoop solveVelocityConstraintFirst="true" />
    <GenericConstraintSolver tolerance="1e-9" maxIterations="1000"/>

    <DefaultVisualManagerLoop/>

    <Node name="rigidSections">
        <EulerImplicitSolver name="odesolver" rayleighStiffness="0.1" rayleighMass="0.1" />
        <SparseLDLSolver template="CompressedRowSparseMatrixd"/>
        <IndirectAssemblingMatrixSystem/>


        <Node name="beam">
            <RegularGridTopology name="grid" nx="1" ny="1" nz="20" xmin="0" xmax="0" ymin="-1.5" ymax="1.5" zmin="0" zmax="19" />
            <MechanicalObject template="Rigid3d" name="DOFs" showObject="true" showObjectScale="1" position="@grid.position"/>
            <FixedConstraint indices="0" />
            <GenericConstraintCorrection />
            <Node name="FEM">
                <RegularGridTopology name="FEM_grid" nx="4" ny="4" nz="20" xmin="-1.5" xmax="1.5" ymin="-1.5" ymax="1.5" zmin="0" zmax="19" />
                <MechanicalObject template="Vec3d" name="FEM_DOFs" position="@FEM_grid.position"/>
                <HexahedronSetGeometryAlgorithms/>
                <MeshMatrixMass massDensity="1"/>
                <HexahedronFEMForceField name="FEM" youngModulus="10000" poissonRatio="0.45" method="large" printLog="false"/>

                <RigidMapping globalToLocalCoords="true" rigidIndexPerPoint="0 0 0 0 0 0 0 0 0 0 0 0 0 0 0 0 1 1 1 1 1 1 1 1 1 1 1 1 1 1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"/>

                <Node name="Visual">
                    <RegularGridTopology name="grid" nx="2" ny="2" nz="20" xmin="-1.5" xmax="1.5" ymin="-1.5" ymax="1.5" zmin="0" zmax="19" computeTriangleList="false" />
                    <OglModel name="visu" lineWidth="5" material="Default Diffuse 0 1 1 1 1 Ambient 1 1 0 0 1 Specular 0 1 0 0 1 Emissive 0 1 0 0 1 Shininess 0 45"/>
                    <BarycentricMapping input="@../FEM_DOFs" output="@visu"/>
                </Node>
            </Node>
        </Node>
    </Node>

</Node>
