<?xml version="1.0" ?>

<!--
    Scene showing how to use MeshOffLoader to load a mesh
    with a .stl extension.
-->

<Node>
    <RequiredPlugin name="SofaOpenglVisual"/>
    <VisualStyle displayFlags="showVisual" />

    <MeshSTLLoader name="STLLoader" filename="mesh/circle_knot_ascii.stl" printLog="true" flipNormals="0" />
    <OglModel src="@STLLoader" name="VisualModel" color="red" />
</Node>
