<?xml version="1.0" ?>
<!--
    Scene showing how to use MeshOffLoader to load a mesh
    with a .trian extension.
-->
<Node name="Root" gravity="0 -9.81 0" dt="0.02">
    <RequiredPlugin name="SofaOpenglVisual"/>
    <RequiredPlugin pluginName='SofaImplicitOdeSolver'/>
    <RequiredPlugin pluginName='SofaMiscCollision'/>

    <VisualStyle displayFlags="showVisual showBehaviorModels showForceFields showCollision showMapping" />
    <DefaultPipeline name="DefaultCollisionPipeline" verbose="0" draw="0" depth="6" />
    <BruteForceBroadPhase/>
    <BVHNarrowPhase/>
    <MinProximityIntersection name="Proximity" alarmDistance="0.3" contactDistance="0.2" />
    <DefaultContactManager name="Response" response="default" />
    <DefaultCollisionGroupManager name="Group" />
    <Node name="Trian file">
        <EulerImplicitSolver name="cg_odesolver" printLog="false"  rayleighStiffness="0.1" rayleighMass="0.1" />
        <CGLinearSolver iterations="25" name="linear solver" tolerance="1.0e-9" threshold="1.0e-9" />
        <MeshTrianLoader name="TrianLoader" filename="mesh/coeur1.trian" />
        <!--	  <MeshGmshLoader name="loader" filename="mesh/square3.msh" /> -->
        <MechanicalObject name="dofs" scale="1" src="@TrianLoader" />
        <TriangleSetTopologyContainer name="topo" src="@TrianLoader" />
        <TriangleSetTopologyModifier name="modif" />
        <TriangleSetGeometryAlgorithms name="triGeo" />
        <OglModel name="VisualModel" src="@TrianLoader" color="red" />
    </Node>
</Node>
